// SBML level 2 version 4

model feb_15th()

  // Compartments:
  compartment default = 1 volume;
  compartment BLOOD_BRAIN_BARRIER in default = 1 volume;
  compartment DOPAMINERGIC_NEURON in default = 1 volume;
  compartment ASTROCYTE in default = 2 volume;
  compartment ACTIVATED_MICROGLIA in default = 1 volume;
  compartment T_CELL in default = 1 volume;
  compartment VESICLE in default = 1 volume;
  compartment MHC_CLASS_2 in default = 1 volume;
  compartment LYSOSOME in ACTIVATED_MICROGLIA = 1 volume;
  compartment GAP_JUNCTION in default = 1 volume;
  compartment SECRETORY_VESICLE in DYING_NEURONS_UNDER_STRESS = 1 volume;
  compartment DYING_NEURONS_UNDER_STRESS in default = 1 volume;

  // Species:
  species s11 in T_CELL = 1.16/T_CELL; s11 is "IFNγ";
  species s12 in T_CELL = 1.83/T_CELL; s12 is "IFNγ";
  species HMGA1 in T_CELL = 1.7/T_CELL;
  species NFAT1 in T_CELL = 0;
  species IFN_R in ACTIVATED_MICROGLIA = 0; IFN_R is "IFNγR";
  substanceOnly species TNF_default in default = 1.78; TNF_default is "TNF α";
  species s21 in MHC_CLASS_2 = 0; s21 is "α 1";
  species s22 in MHC_CLASS_2 = 0; s22 is "β 1";
  species s23 in MHC_CLASS_2 = 0; s23 is "α 2";
  species s24 in MHC_CLASS_2 = 0; s24 is "β 2";
  species TCR in T_CELL = 0;
  species PHAGOCYTOSIS in ACTIVATED_MICROGLIA = 0;
  species SYN_LYSOSOME in LYSOSOME = 0; SYN_LYSOSOME is "α-SYN";
  species SYN_MHC_CLASS_2 in MHC_CLASS_2 = 0; SYN_MHC_CLASS_2 is "α-SYN";
  species TNFR1_ACTIVATED_MICROGLIA in ACTIVATED_MICROGLIA = 1/ACTIVATED_MICROGLIA;
  species MAPK_ERK in default = 0; MAPK_ERK is "MAPK/ERK";
  species TNF_ACTIVATED_MICROGLIA in ACTIVATED_MICROGLIA = 0; TNF_ACTIVATED_MICROGLIA is "TNF α";
  species ATP_VESICLE in VESICLE = 0;
  species P2X7R in ACTIVATED_MICROGLIA = 0;
  species MEK in ACTIVATED_MICROGLIA = 0;
  species ERK in ACTIVATED_MICROGLIA = 0;
  species p38 in ACTIVATED_MICROGLIA = 0;
  species GLUTAMINE in ACTIVATED_MICROGLIA = 0;
  species s44 in ACTIVATED_MICROGLIA = 0; s44 is "GLUTAMATE";
  species GLUTAMINASE in ACTIVATED_MICROGLIA = 0;
  substanceOnly species EXCESS_GLUTAMATE in default = 1;
  species mGluR2 in ACTIVATED_MICROGLIA = 0;
  species SYN_default in default = 0; SYN_default is "α-SYN";
  species ATP_ACTIVATED_MICROGLIA in ACTIVATED_MICROGLIA = 0;
  species s51 in ACTIVATED_MICROGLIA = 0; s51 is "GLUTAMATE";
  substanceOnly species TNFR1_ASTROCYTE in ASTROCYTE = 4e-5;
  species CXCR4_ASTROCYTE in ASTROCYTE = 0;
  substanceOnly species s55 in default = 0; s55 is "SDF1 α";
  species TNF_ASTROCYTE in ASTROCYTE = 0; TNF_ASTROCYTE is "TNF α";
  species Ca_2 in ASTROCYTE = 0; Ca_2 is "Ca 2+";
  species TACE in ASTROCYTE = 0;
  species PGE2 in ASTROCYTE = 0;
  species ACTIVATION_OF_ERK_MAPK_PATHWAY in ASTROCYTE = 0;
  species PHOSPHOLIPASE_A_2 in ASTROCYTE = 0;
  species GLUTAMATE_ASTROCYTE in ASTROCYTE = 0;
  species EAAT2 in ASTROCYTE = 0;
  species EAAT2_GLT_1_mrna in ASTROCYTE = 0; EAAT2_GLT_1_mrna is "EAAT2/GLT-1 mrna";
  species s71 in ASTROCYTE = 0; s71 is "Binding of NF-κB to EAAT2 promoter";
  species NMDAR in DOPAMINERGIC_NEURON = 0;
  species s74 in DOPAMINERGIC_NEURON = 0; s74 is "Activation of JNK signalling pathway";
  species CELL_DEATH in DOPAMINERGIC_NEURON = 0;
  species IFN_default in default = 0; IFN_default is "IFNγ";
  species RISE_IN_INTRACELLULAR_Ca_2 in ASTROCYTE = 0; RISE_IN_INTRACELLULAR_Ca_2 is "RISE IN INTRACELLULAR Ca 2+";
  species Calpain_Activation in DOPAMINERGIC_NEURON = 0;
  species Lewy_body_formation in DOPAMINERGIC_NEURON = 0;
  species Formation_of_cleaved_cdk5 in DOPAMINERGIC_NEURON = 0;
  substanceOnly species EXCESS_Ca_2_INFLUX in DOPAMINERGIC_NEURON = 0.37; EXCESS_Ca_2_INFLUX is "EXCESS Ca 2+ INFLUX";
  species CXCR4_ACTIVATED_MICROGLIA in ACTIVATED_MICROGLIA = 0;
  substanceOnly species s92 in default = 2.1e-6; s92 is "SDF1α";
  species MISFOLDED_ALPHA_SYNUCLEIN in SECRETORY_VESICLE = 0;

  // Reactions:
  re4: s11 + HMGA1 + NFAT1 + MISFOLDED_ALPHA_SYNUCLEIN + MISFOLDED_ALPHA_SYNUCLEIN + MISFOLDED_ALPHA_SYNUCLEIN + MISFOLDED_ALPHA_SYNUCLEIN => s12; s11*HMGA1*NFAT1*MISFOLDED_ALPHA_SYNUCLEIN*MISFOLDED_ALPHA_SYNUCLEIN*MISFOLDED_ALPHA_SYNUCLEIN*MISFOLDED_ALPHA_SYNUCLEIN*re4_k1;
    re4_k1 = 0.1 substance;
  re12: s12 => IFN_default; s12*re12_k1;
    re12_k1 = 0.1 substance;
  re14: MISFOLDED_ALPHA_SYNUCLEIN => PHAGOCYTOSIS; MISFOLDED_ALPHA_SYNUCLEIN*re14_k1;
    re14_k1 = 0.1 substance;
  re15: PHAGOCYTOSIS => SYN_LYSOSOME; PHAGOCYTOSIS*re15_k1;
    re15_k1 = 0.1 substance;
  re16: SYN_LYSOSOME => s24; SYN_LYSOSOME*re16_k1;
    re16_k1 = 0.1 substance;
  re20: IFN_R => MAPK_ERK; IFN_R*re20_k1;
    re20_k1 = 0.1 substance;
  re21: MAPK_ERK => TNF_default; MAPK_ERK*re21_k1;
    re21_k1 = 0.1 substance;
  re25: TNFR1_ACTIVATED_MICROGLIA => TNF_ACTIVATED_MICROGLIA; TNFR1_ACTIVATED_MICROGLIA*re25_k1;
    re25_k1 = 0.1 substance;
  re26: TNF_ACTIVATED_MICROGLIA => TNF_default; TNF_ACTIVATED_MICROGLIA*re26_k1;
    re26_k1 = 0.1 substance;
  re28: ATP_VESICLE => P2X7R; ATP_VESICLE*re28_k1;
    re28_k1 = 0.1 substance;
  re29: ATP_ACTIVATED_MICROGLIA + ERK + p38 + MEK => TNF_ACTIVATED_MICROGLIA; ATP_ACTIVATED_MICROGLIA*ERK*p38*MEK*re29_k1;
    re29_k1 = 0.1 substance;
  re30: GLUTAMINE + GLUTAMINASE => s44; GLUTAMINE*GLUTAMINASE*re30_k1;
    re30_k1 = 0.1 substance;
  re32: TNF_ACTIVATED_MICROGLIA => GLUTAMINASE; TNF_ACTIVATED_MICROGLIA*re32_k1;
    re32_k1 = 0.1 substance;
  re33: s44 => EXCESS_GLUTAMATE; s44*re33_k1;
    re33_k1 = 0.1 substance;
  re34: SYN_MHC_CLASS_2 => TCR; SYN_MHC_CLASS_2*re34_k1;
    re34_k1 = 0.1 substance;
  re35: EXCESS_GLUTAMATE => mGluR2; EXCESS_GLUTAMATE*re35_k1;
    re35_k1 = 0.1 substance;
  re36: mGluR2 => TNF_default; mGluR2*re36_k1;
    re36_k1 = 0.1 substance;
  re38: TNF_default => TNFR1_ACTIVATED_MICROGLIA; TNF_default*re38_k1;
    re38_k1 = 0.1 substance;
  re39: CXCR4_ASTROCYTE => ACTIVATION_OF_ERK_MAPK_PATHWAY; CXCR4_ASTROCYTE*re39_k1;
    re39_k1 = 0.1 substance;
  re40: ACTIVATION_OF_ERK_MAPK_PATHWAY + TACE + Ca_2 => TNF_ASTROCYTE; ACTIVATION_OF_ERK_MAPK_PATHWAY*TACE*Ca_2*re40_k1;
    re40_k1 = 0.1 substance;
  re41: TNF_ASTROCYTE => TNF_default; TNF_ASTROCYTE*re41_k1;
    re41_k1 = 0.001 substance;
  re42: TNF_default => TNFR1_ASTROCYTE; TNF_default*re42_k1;
    re42_k1 = 0.01 substance;
  re43: TNFR1_ASTROCYTE + PHOSPHOLIPASE_A_2 => PGE2; TNFR1_ASTROCYTE*PHOSPHOLIPASE_A_2*re43_k1;
    re43_k1 = 0.1 substance;
  re46: PGE2 => RISE_IN_INTRACELLULAR_Ca_2; PGE2*re46_k1;
    re46_k1 = 0.1 substance;
  re48: RISE_IN_INTRACELLULAR_Ca_2 => GLUTAMATE_ASTROCYTE; RISE_IN_INTRACELLULAR_Ca_2*re48_k1;
    re48_k1 = 0.1 substance;
  re49: GLUTAMATE_ASTROCYTE => EXCESS_GLUTAMATE; GLUTAMATE_ASTROCYTE*re49_k1;
    re49_k1 = 0.01 substance;
  re50: EAAT2_GLT_1_mrna => EAAT2; EAAT2_GLT_1_mrna*re50_k1;  // modifiers: s71
    re50_k1 = 0.1 substance;
  re51: TNF_default => s71; TNF_default*re51_k1;
    re51_k1 = 0.1 substance;
  re52: EAAT2 => EXCESS_GLUTAMATE; EAAT2*re52_k1;
    re52_k1 = 0.01 substance;
  re55: EXCESS_GLUTAMATE => NMDAR; EXCESS_GLUTAMATE*re55_k1;
    re55_k1 = 0.01 substance;
  re56: NMDAR => EXCESS_Ca_2_INFLUX; NMDAR*re56_k1;
    re56_k1 = 0.1 substance;
  re57: EXCESS_Ca_2_INFLUX => s74; EXCESS_Ca_2_INFLUX*re57_k1;
    re57_k1 = 0.1 substance;
  re58: s74 => CELL_DEATH; s74*re58_k1;
    re58_k1 = 0.1 substance;
  re59: EXCESS_Ca_2_INFLUX => Calpain_Activation; EXCESS_Ca_2_INFLUX*re59_k1;
    re59_k1 = 0.1 substance;
  re60: Calpain_Activation => Lewy_body_formation; Calpain_Activation*re60_k1;
    re60_k1 = 0.1 substance;
  re61: Lewy_body_formation => CELL_DEATH; Lewy_body_formation*re61_k1;
    re61_k1 = 0.1 substance;
  re62: Calpain_Activation => Formation_of_cleaved_cdk5; Calpain_Activation*re62_k1;
    re62_k1 = 0.1 substance;
  re64: Formation_of_cleaved_cdk5 => CELL_DEATH; Formation_of_cleaved_cdk5*re64_k1;
    re64_k1 = 0.1 substance;
  re65: s55 => s92; s55*re65_k1;
    re65_k1 = 0.0001 substance;
  re66: CXCR4_ACTIVATED_MICROGLIA => TNF_default; CXCR4_ACTIVATED_MICROGLIA*re66_k1;
    re66_k1 = 0.1 substance;

  // Unit definitions:
  unit substance = mole;
  unit volume = litre;
  unit area = metre^2;
  unit length = metre;
  unit time = second;
end
