// SBML level 2 version 4

model newTNFa()

  // Compartments:
  compartment default = 1 volume;
  compartment Activated_Microglia in default = 10 volume;
  compartment Activated_Astrocytes in default = 3 volume;
  compartment Dopaminergic_cells in default = 3 volume;
  compartment Damaged_Neuron in default = 4 volume;
  compartment Nucleus in Activated_Microglia = 3 volume;
  compartment Mitochondria in Dopaminergic_cells = 3 volume;
  compartment Blood_Brain_Barrier in default = 5 volume;

  // Species:
  species T_cell in Blood_Brain_Barrier = 0;
  species TNF_default in default = 0; TNF_default is "TNF α";
  species NO in Activated_Microglia = 0.0509;
  species NOS in Activated_Microglia = 0;
  species TRADD in Dopaminergic_cells = 0;
  species Procaspase_8 in Dopaminergic_cells = 0;
  species Caspase_8 in Dopaminergic_cells = 0;
  species Caspase3 in Dopaminergic_cells = 0.0031;
  species L_arginine in Activated_Microglia = 0; L_arginine is "L-arginine";
  species L_citruline in Activated_Microglia = 0; L_citruline is "L-citruline";
  species NFkB in Activated_Microglia = 0;
  species NFK in Nucleus = 0; NFK is "NFKβ";
  species TNFA in Nucleus = 0;
  species ATP in Damaged_Neuron = 0;
  species P2Y in Activated_Microglia = 0;
  species NADPH_oxidase in Activated_Microglia = 0.25;
  species Cathepsin_B in Activated_Microglia = 0;
  species ROS_Activated_Microglia in Activated_Microglia = 0.0496;
  species TNFR1_Activated_Microglia in Activated_Microglia = 0.17;
  species IL_1_Activated_Microglia in Activated_Microglia = 0.014; IL_1_Activated_Microglia is "IL-1β";
  species BID_Dopaminergic_cells in Dopaminergic_cells = 0;
  species Cytochrome_C_Mitochondria in Mitochondria = 0;
  species IL_1_Activated_Astrocytes in Activated_Astrocytes = 0.00436; IL_1_Activated_Astrocytes is "IL-1β";
  species synuclein_Activated_Astrocytes in Activated_Astrocytes = 0.432; synuclein_Activated_Astrocytes is "α synuclein";
  species Cytochrome_C_Dopaminergic_cells in Dopaminergic_cells = 0;
  species BID_Mitochondria in Mitochondria = 0;
  species TNFR1_Dopaminergic_cells in Dopaminergic_cells = 0.17;
  species ROS_Activated_Astrocytes in Activated_Astrocytes = 0.0311;
  species TNFR1_Activated_Astrocytes in Activated_Astrocytes = 0.196;
  species TNF_Activated_Astrocytes in Activated_Astrocytes = 0.0691; TNF_Activated_Astrocytes is "TNFα";
  species TNF_Activated_Microglia in Activated_Microglia = 0.0799; TNF_Activated_Microglia is "TNFα";
  species Procaspase_9 in Dopaminergic_cells = 0;
  species Apoptosome in Dopaminergic_cells = 0;
  species Caspase_9 in Dopaminergic_cells = 0.693;
  species Cell_death in Dopaminergic_cells = 0;
  species Apaf1 in Dopaminergic_cells = 0;
  species FADD in Dopaminergic_cells = 0;
  species synuclein_Dopaminergic_cells in Dopaminergic_cells = 0.491; synuclein_Dopaminergic_cells is "α synuclein";
  species Activation_of_JNK_pathway in Dopaminergic_cells = 0;
  species Activation_of_p38_MAPK_pathway in Dopaminergic_cells = 0;

  // Reactions:
  re45: T_cell => TNF_default; T_cell*re45_k2;
    re45_k1 = 0.01 substance; re45_k2 = 0.01 substance;
  re46: TNF_Activated_Microglia => TNF_default; TNF_Activated_Microglia*re46_k2;
    re46_k1 = 0.00084 substance; re46_k2 = 0.1 substance;
  re47: TNF_default => TNFR1_Activated_Microglia; TNF_default*re47_k1;
    re47_k1 = 0.009 substance;
  re48: NOS + L_arginine => NO + L_citruline; NOS*L_arginine*re48_k3;
    re48_k1 = 0.00085 substance; re48_k2 = 0.1 substance; re48_k3 = 0.01 substance;
  re49: TNFR1_Activated_Astrocytes => ROS_Activated_Astrocytes; TNFR1_Activated_Astrocytes*re49_k1;
    re49_k1 = 0.00109 substance;
  re50: TNFR1_Dopaminergic_cells => TRADD; TNFR1_Dopaminergic_cells*re50_k2;
    re50_k1 = 0.01 substance; re50_k2 = 0.1 substance;
  re52: Procaspase_8 => Caspase_8; Procaspase_8*re52_k1;
    re52_k1 = 0.01 substance;
  re53: Caspase_8 => Caspase3; Caspase_8*re53_k1;
    re53_k1 = 0.01 substance;
  re54: Caspase3 => Cell_death; Caspase3*re54_k3;
    re54_k1 = 0.01 substance; re54_k2 = 0.1 substance; re54_k3 = 0.1 substance;
  re55: NO => Cell_death; NO*re55_k6;
    re55_k1 = 0.0001 substance; re55_k2 = 0.01 substance; re55_k3 = 0.1 substance; re55_k4 = 0.001 substance; re55_k5 = 0.1 substance; re55_k6 = 0.1 substance;
  re56: ROS_Activated_Microglia => Cell_death; ROS_Activated_Microglia*re56_k1;
    re56_k1 = 0.001 substance;
  re57: ROS_Activated_Astrocytes => Cell_death; ROS_Activated_Astrocytes*re57_k2;
    re57_k1 = 0.001 substance; re57_k2 = 0.1 substance;
  re59: TNFR1_Activated_Microglia => NFkB; TNFR1_Activated_Microglia*re59_k1;
    re59_k1 = 0.01 substance;
  re60: NFkB => NFK; NFkB*re60_k1;
    re60_k1 = 0.01 substance;
  re61: NFK => TNFA; NFK*re61_k1;
    re61_k1 = 0.01 substance;
  re62: TNFA => TNF_Activated_Microglia; TNFA*re62_k1;
    re62_k1 = 0.01 substance;
  re64: NFK => NOS; NFK*re64_k1;
    re64_k1 = 0.01 substance;
  re65: ATP => P2Y; ATP*re65_k1;
    re65_k1 = 0.001 substance;
  re66: P2Y => NOS; P2Y*re66_k1;
    re66_k1 = 0.0001 substance;
  re67: NFK => IL_1_Activated_Microglia; NFK*re67_k1;
    re67_k1 = 0.0001 substance;
  re68: P2Y => IL_1_Activated_Microglia; P2Y*re68_k1;
    re68_k1 = 0.0001 substance;
  re69: P2Y => TNF_Activated_Microglia; P2Y*re69_k1;
    re69_k1 = 0.01 substance;
  re70: TNFR1_Activated_Microglia => NADPH_oxidase; TNFR1_Activated_Microglia*re70_k1;
    re70_k1 = 0.1 substance;
  re71: NADPH_oxidase => ROS_Activated_Microglia; NADPH_oxidase*re71_k2;
    re71_k1 = 0.001 substance; re71_k2 = 0.1 substance;
  re72: TNFR1_Activated_Microglia => Cathepsin_B; TNFR1_Activated_Microglia*re72_k1;
    re72_k1 = 0.01 substance;
  re73: Cathepsin_B => Cell_death; Cathepsin_B*re73_k1;
    re73_k1 = 0.01 substance;
  re74: Caspase_8 => BID_Dopaminergic_cells; Caspase_8*re74_k1;
    re74_k1 = 0.01 substance;
  re75: BID_Dopaminergic_cells => BID_Mitochondria; BID_Dopaminergic_cells*re75_k1;
    re75_k1 = 0.01 substance;
  re76: BID_Mitochondria => Cytochrome_C_Mitochondria; BID_Mitochondria*re76_k1;
    re76_k1 = 0.001 substance;
  re77: Cytochrome_C_Mitochondria => Cytochrome_C_Dopaminergic_cells; Cytochrome_C_Mitochondria*re77_k1;
    re77_k1 = 0.001 substance;
  re79: synuclein_Dopaminergic_cells => synuclein_Activated_Astrocytes; synuclein_Dopaminergic_cells*re79_k6;
    re79_k1 = 0.001 substance; re79_k2 = 0.1 substance; re79_k3 = 0.01 substance; re79_k4 = 0.001 substance; re79_k5 = 0.1 substance; re79_k6 = 0.05 substance;
  re80: TNFR1_Activated_Astrocytes => IL_1_Activated_Astrocytes; TNFR1_Activated_Astrocytes*re80_k1;
    re80_k1 = 0.0001 substance;
  re81: synuclein_Activated_Astrocytes => IL_1_Activated_Astrocytes; synuclein_Activated_Astrocytes*re81_k1;
    re81_k1 = 0.0001 substance;
  re82: synuclein_Activated_Astrocytes => TNF_Activated_Astrocytes; synuclein_Activated_Astrocytes*re82_k3;
    re82_k1 = 0.01 substance; re82_k2 = 0.1 substance; re82_k3 = 0.01 substance;
  re83: TNF_default => TNFR1_Activated_Astrocytes; TNF_default*re83_k2;
    re83_k1 = 0.01 substance; re83_k2 = 0.1 substance;
  re84: TNFR1_Activated_Astrocytes => TNF_Activated_Astrocytes; TNFR1_Activated_Astrocytes*re84_k1;
    re84_k1 = 0.01 substance;
  re85: TNF_Activated_Astrocytes => TNF_default; TNF_Activated_Astrocytes*re85_k5;
    re85_k1 = 0.001 substance; re85_k2 = 0.1 substance; re85_k3 = 0.1 substance; re85_k4 = 0.1 substance; re85_k5 = 0.01 substance;
  re86: IL_1_Activated_Microglia => Cell_death; IL_1_Activated_Microglia*re86_k2;
    re86_k1 = 0.01 substance; re86_k2 = 0.1 substance;
  re87: IL_1_Activated_Astrocytes => Cell_death; IL_1_Activated_Astrocytes*re87_k2;
    re87_k1 = 0.01 substance; re87_k2 = 0.1 substance;
  re88: Cell_death => ATP; Cell_death*re88_k2;
    re88_k1 = 0.0001 substance; re88_k2 = 0.1 substance;
  re89: Cytochrome_C_Dopaminergic_cells + Apaf1 => Apoptosome; Cytochrome_C_Dopaminergic_cells*Apaf1*re89_k1;
    re89_k1 = 0.001 substance;
  re91: Procaspase_9 => Caspase_9; Procaspase_9*re91_k4;  // modifiers: Apoptosome
    re91_k1 = 0.01 substance; re91_k2 = 0.1 substance; re91_k3 = 0.1 substance; re91_k4 = 0.01 substance;
  re93: Caspase_9 => Caspase3; Caspase_9*re93_k1;
    re93_k1 = 0.01 substance;
  re94: TRADD => FADD; TRADD*re94_k1;
    re94_k1 = 0.01 substance;
  re95: FADD => Procaspase_8; FADD*re95_k1;
    re95_k1 = 5e-5 substance;
  re96: TNF_default => TNFR1_Dopaminergic_cells; TNF_default*re96_k3;
    re96_k1 = 0.011 substance; re96_k2 = 0.1 substance; re96_k3 = 0.001 substance;
  re97: TNFR1_Dopaminergic_cells => Activation_of_JNK_pathway; TNFR1_Dopaminergic_cells*re97_k1;
    re97_k1 = 0.1 substance;
  re99: ROS_Activated_Microglia => Activation_of_p38_MAPK_pathway; ROS_Activated_Microglia*re99_k2;
    re99_k1 = 0.1 substance; re99_k2 = 0.1 substance;
  re101: Activation_of_JNK_pathway => Cell_death; Activation_of_JNK_pathway*re101_k1;
    re101_k1 = 0.1 substance;
  re102: Activation_of_p38_MAPK_pathway => Cell_death; Activation_of_p38_MAPK_pathway*re102_k1;
    re102_k1 = 0.1 substance;

  // Unit definitions:
  unit substance = mole;
  unit volume = litre;
  unit area = metre^2;
  unit length = metre;
  unit time = second;
end
