// SBML level 2 version 4

model AD_PD()

  // Compartments:
  compartment default = 1 volume;

  // Species:
  species p38 in default = 0;
  substanceOnly species syn in default = 1.56; syn is "α-syn";
  substanceOnly species IL6 in default = 2.1;
  species cyt_c in default = 0;
  species Apoptosis in default = 0;
  species oxidative_stress in default = 0;
  species ROS in default = 0;
  species APP in default = 0;
  substanceOnly species A_42 in default = 367.15; A_42 is "Aβ42";
  substanceOnly species IL1B in default = 11.122;
  substanceOnly species s31 in default = 2.02; s31 is "Tau";
  substanceOnly species s32 in default = 3.83; s32 is "Tau";
  species PrPc in default = 0;
  species NMDAR in default = 0;
  species Microglial_activation in default = 0;
  species NF_B in default = 0; NF_B is "NFκB";
  species iNOS in default = 0;
  substanceOnly species NO in default = 21438300.1;
  species Lipid_Peroxidation in default = 0;
  species Caspase_1 in default = 0;
  species A in default = 0; A is "Aβ";
  species Tangles in default = 0;
  species Lewy_Bodies in default = 0;
  substanceOnly species Caspase9 in default = 900;
  substanceOnly species Ca2 in default = 89131.02; Ca2 is "Ca2+";
  species increased_Ca2 in default = 0; increased_Ca2 is "increased Ca2+";
  species NOS in default = 0;
  species GSK3 in default = 0; GSK3 is "GSK3β";
  species TNFR1 in default = 0;
  species Glutamate in default = 0;
  species Excess_Glutamate in default = 0;
  species TNFa in default = 0;

  // Reactions:
  re6: syn => IL6; syn*re6_k1;
    re6_k1 = 0.01 substance;
  re7: syn => cyt_c; syn*re7_k1;
    re7_k1 = 0.01 substance;
  re8: IL6 => cyt_c; IL6*re8_k2;
    re8_k1 = 0.01 substance; re8_k2 = 0.01 substance;
  re12: oxidative_stress => Apoptosis; oxidative_stress*re12_k1;
    re12_k1 = 0.01 substance;
  re14: APP => A_42; APP*re14_k1;
    re14_k1 = 0.01 substance;
  re17: A_42 => ROS; A_42*re17_k1;
    re17_k1 = 0.01 substance;
  re18: ROS => p38; ROS*re18_k1;
    re18_k1 = 0.01 substance;
  re27: A_42 => TNFa; A_42*re27_k1;
    re27_k1 = 0.01 substance;
  re34: cyt_c => oxidative_stress; cyt_c*re34_k1;
    re34_k1 = 0.01 substance;
  re36: p38 => TNFa; p38*re36_k1;
    re36_k1 = 0.01 substance;
  re40: s31 => s32; s31*re40_k1;  // modifiers: oxidative_stress
    re40_k1 = 0.01 substance;
  re41: syn => p38; syn*re41_k1;
    re41_k1 = 0.01 substance;
  re42: p38 => s31; p38*re42_k1;
    re42_k1 = 0.01 substance;
  re43: ROS => oxidative_stress; ROS*re43_k1;
    re43_k1 = 0.01 substance;
  re46: A_42 => A_42; A_42*re46_k1;
    re46_k1 = 0.01 substance;
  re47: A_42 => PrPc; A_42*re47_k2;
    re47_k1 = 0.01 substance; re47_k2 = 0.01 substance;
  re48: A_42 => NMDAR; A_42*re48_k1;
    re48_k1 = 0.01 substance;
  re49: PrPc => Ca2; PrPc*re49_k1;
    re49_k1 = 0.01 substance;
  re50: NMDAR => Ca2; NMDAR*re50_k1;
    re50_k1 = 0.01 substance;
  re60: p38 => Microglial_activation; p38*re60_k1;
    re60_k1 = 0.01 substance;
  re61: p38 => ROS; p38*re61_k1;
    re61_k1 = 0.01 substance;
  re62: p38 + NF_B => iNOS; p38*NF_B*re62_k1;
    re62_k1 = 0.01 substance;
  re63: iNOS => NO; iNOS*re63_k1;
    re63_k1 = 0.01 substance;
  re65: ROS => Caspase_1; ROS*re65_k1;
    re65_k1 = 0.01 substance;
  re67: NO => Lipid_Peroxidation; NO*re67_k1;
    re67_k1 = 0.01 substance;
  re68: Caspase_1 => Apoptosis; Caspase_1*re68_k1;
    re68_k1 = 0.01 substance;
  re70: TNFa => Microglial_activation; TNFa*re70_k1;
    re70_k1 = 0.01 substance;
  re71: Microglial_activation => ROS; Microglial_activation*re71_k1;
    re71_k1 = 0.01 substance;
  re72: APP => A; APP*re72_k1;
    re72_k1 = 0.01 substance;
  re73: A => syn; A*re73_k1;
    re73_k1 = 0.01 substance;
  re74: s31 => syn; s31*re74_k1;
    re74_k1 = 0.01 substance;
  re75: syn => s31; syn*re75_k1;
    re75_k1 = 0.01 substance;
  re76: s32 => Tangles; s32*re76_k1;
    re76_k1 = 0.01 substance;
  re77: syn => Lewy_Bodies; syn*re77_k1;
    re77_k1 = 0.01 substance;
  re78: oxidative_stress => Microglial_activation; oxidative_stress*re78_k1;
    re78_k1 = 0.01 substance;
  re79: ROS => Caspase9; ROS*re79_k1;
    re79_k1 = 0.01 substance;
  re80: Caspase9 => Apoptosis; Caspase9*re80_k1;
    re80_k1 = 0.01 substance;
  re81: oxidative_stress => p38; oxidative_stress*re81_k1;
    re81_k1 = 0.01 substance;
  re82: A_42 => Microglial_activation; A_42*re82_k1;
    re82_k1 = 0.01 substance;
  re83: Microglial_activation => TNFa; Microglial_activation*re83_k1;
    re83_k1 = 0.01 substance;
  re84: Microglial_activation => IL1B; Microglial_activation*re84_k1;
    re84_k1 = 0.01 substance;
  re85: A => p38; A*re85_k1;
    re85_k1 = 0.01 substance;
  re86: syn => increased_Ca2; syn*re86_k1;
    re86_k1 = 0.01 substance;
  re87: A_42 => Ca2; A_42*re87_k1;
    re87_k1 = 0.01 substance;
  re88: Ca2 => NOS; Ca2*re88_k1;
    re88_k1 = 0.01 substance;
  re89: NOS => NO; NOS*re89_k1;
    re89_k1 = 0.01 substance;
  re90: GSK3 => s32; GSK3*re90_k1;
    re90_k1 = 0.01 substance;
  re145: TNFa => Ca2; ;
  re146: Tangles => Apoptosis; ;
  re147: Lewy_Bodies => Apoptosis; ;
  re148: TNFR1 => TNFa; ;
  re150: TNFR1 => increased_Ca2; ;
  re151: increased_Ca2 => Glutamate; ;
  re152: Glutamate => Excess_Glutamate; ;
  re153: TNFR1 => Glutamate; ;

  // Unit definitions:
  unit substance = mole;
  unit volume = litre;
  unit area = metre^2;
  unit length = metre;
  unit time = second;
end
